*Heading
** Job name: Job-1 Model name: Model-1
** Generated by: Abaqus/CAE Student Edition 2019
*Preprint, echo=NO, model=NO, history=NO, contact=NO
**
** PARTS
**
*Part, name=Part-2
*Node
      1,   2.42705107,   1.76335573,           0.
      2,  0.927051008,   2.85316944,           0.
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*Element, type=B31
1,  1, 27
2, 27, 28
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*Nset, nset=All_Members, generate
   1,  191,    1
*Elset, elset=All_Members, generate
   1,  230,    1
** Section: Bean Section  Profile: Circular_Bar
*Beam Section, elset=All_Members, material=Aluminum_6061, temperature=GRADIENTS, section=CIRC
0.025
0.,0.,-1.
*End Part
**
*Part, name=Part-3
*Node
      1,           0.,    2.8499999,           0.
      2,  0.492951661,   2.80141115,           0.
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*Element, type=S4
  1,   2,   3,  12,  11
  2,   3,   4,  13,  12
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*Element, type=S3
289,   1,   2,  11
290,   1,  11,  20
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*Nset, nset=Set-1, generate
   1,  325,    1
*Elset, elset=Set-1, generate
   1,  324,    1
** Section: Kevlar_Section
*Shell Section, elset=Set-1, material=kevlar
0.1, 5
*End Part
**
**
** ASSEMBLY
**
*Assembly, name=Assembly
**
*Instance, name=Part-2-1, part=Part-2
-0.440406912619429, 4.73531392340201, -2.85317000000002
*End Instance
**
*Instance, name=Part-3-1, part=Part-3
-0.440406893458311, 4.73531399775849,     -2.85317
-0.440406893458311, 4.73531399775849,     -2.85317, -0.101446813451913, 5.40056061251017, -2.18792338524832, 142.550785292882
*End Instance
**
*Nset, nset=Dome_Edge, instance=Part-3-1, generate
  10,  325,    9
*Elset, elset=Dome_Edge, instance=Part-3-1, generate
   8,  288,    8
*Nset, nset=Geodesic_Frame, instance=Part-2-1, generate
   1,  191,    1
*Elset, elset=Geodesic_Frame, instance=Part-2-1, generate
   1,  230,    1
*Nset, nset=Mounting_Points, instance=Part-2-1
  1,  2, 10, 11, 16, 17, 20, 21, 24, 25
*Nset, nset=Set-2, instance=Part-2-1
 23,
*Nset, nset=Set-4, instance=Part-3-1, generate
   1,  325,    1
*Elset, elset=Set-4, instance=Part-3-1, generate
   1,  324,    1
*Nset, nset=Set-5, instance=Part-3-1, generate
  10,  325,    9
*Elset, elset=Set-5, instance=Part-3-1, generate
   8,  288,    8
*Nset, nset=Set-6, instance=Part-3-1, generate
  10,  325,    9
*Elset, elset=Set-6, instance=Part-3-1, generate
   8,  288,    8
*Nset, nset=s_Set-7, instance=Part-2-1, generate
   1,  191,    1
*Elset, elset=s_Set-7, instance=Part-2-1, generate
   1,  230,    1
*Nset, nset=s_Set-9, instance=Part-2-1, generate
   1,  191,    1
*Elset, elset=s_Set-9, instance=Part-2-1, generate
   1,  230,    1
*Elset, elset=_Pressure_Surface_SPOS, internal, instance=Part-3-1, generate
   1,  324,    1
*Surface, type=ELEMENT, name=Pressure_Surface
_Pressure_Surface_SPOS, SPOS
*Elset, elset=_m_Surf-1_SPOS, internal, instance=Part-3-1, generate
   1,  324,    1
*Surface, type=ELEMENT, name=m_Surf-1
_m_Surf-1_SPOS, SPOS
*Elset, elset=_m_Surf-3_SPOS, internal, instance=Part-3-1, generate
   1,  324,    1
*Surface, type=ELEMENT, name=m_Surf-3
_m_Surf-3_SPOS, SPOS
*Elset, elset=_m_Surf-4_SPOS, internal, instance=Part-3-1, generate
   1,  324,    1
*Surface, type=ELEMENT, name=m_Surf-4
_m_Surf-4_SPOS, SPOS
*Surface, type=NODE, name=s_Set-9_CNS_, internal
s_Set-9, 1.
*End Assembly
**
** MATERIALS
**
*Material, name=Aluminum_6061
*Density
2720.,
*Elastic
 7e+10, 0.33
*Material, name=kevlar
*Density
1380.,
*Elastic
10000., 0.36
**
** INTERACTION PROPERTIES
**
*Surface Interaction, name=IntProp-1
1.,
*Friction
0.,
**
** INTERACTIONS
**
** Interaction: Int-1
*Contact Pair, interaction=IntProp-1, type=SURFACE TO SURFACE
s_Set-9_CNS_, m_Surf-4
** ----------------------------------------------------------------
**
** STEP: Step-1
**
*Step, name=Step-1, nlgeom=NO
*Dynamic
1.,1.,1e-05
**
** BOUNDARY CONDITIONS
**
** Name: BC-1 Type: Displacement/Rotation
*Boundary
Mounting_Points, 1, 1
Mounting_Points, 2, 2
Mounting_Points, 3, 3
** Name: BC-2 Type: Displacement/Rotation
*Boundary
Dome_Edge, 1, 1
Dome_Edge, 2, 2
Dome_Edge, 3, 3
**
** LOADS
**
** Name: Load-1   Type: Pressure
*Dsload
Pressure_Surface, P, -101.
**
** OUTPUT REQUESTS
**
*Restart, write, frequency=0
**
** FIELD OUTPUT: F-Output-1
**
*Output, field, variable=PRESELECT
**
** HISTORY OUTPUT: H-Output-1
**
*Output, history, variable=PRESELECT
*End Step
