*Heading
** Job name: Job-1 Model name: Model-1
** Generated by: Abaqus/CAE Student Edition 2019
*Preprint, echo=NO, model=NO, history=NO, contact=NO
**
** PARTS
**
*Part, name=Part-1
*Node
      1,  0.349999994,           0.
      2, -0.649999976,           0.
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*Element, type=B21
  1,   2,   4
  2,   4,   5
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*Nset, nset=All
   1,   2,   4,   5,   6,   7
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*Elset, elset=All, generate
   1,  476,    1
*Nset, nset=Loading_Point2
 2,
*Nset, nset=Set-5, generate
   1,  953,    1
*Elset, elset=Set-5, generate
   1,  952,    1
** Region: (Pipe:Set-5), (Beam Orientation:All)
*Elset, elset=_I1, internal, generate
   1,  476,    1
** Section: Pipe  Profile: Pipe_Profile
*Beam Section, elset=_I1, material=Aluminum-6061, poisson = 0.33, temperature=GRADIENTS, section=PIPE
0.0252, 0.00615
0.,0.,-1.
** Region: (Pipe:Set-5)
*Elset, elset=_I2, internal, generate
 477,  952,    1
** Section: Pipe  Profile: Pipe_Profile
*Beam Section, elset=_I2, material=Aluminum-6061, poisson = 0.33, temperature=GRADIENTS, section=PIPE
0.0252, 0.00615
0.,0.,-1.
*End Part
**
**
** ASSEMBLY
**
*Assembly, name=Assembly
**
*Instance, name=Part-1-1, part=Part-1
*End Instance
**
*Nset, nset="Left Support", instance=Part-1-1
 2,
*Nset, nset=Left_Support, instance=Part-1-1
 3,
*Nset, nset=Right_Support, instance=Part-1-1
 1,
*Nset, nset=Set-4, instance=Part-1-1
 2,
*End Assembly
**
** MATERIALS
**
*Material, name=Aluminum-6061
*Elastic
 7e+10, 0.33
** ----------------------------------------------------------------
**
** STEP: Load
**
*Step, name=Load, nlgeom=NO
Load Step
*Static
1., 1., 1e-05, 1.
**
** BOUNDARY CONDITIONS
**
** Name: Left_Support Type: Displacement/Rotation
*Boundary
Left_Support, 1, 1
**
** LOADS
**
** Name: Load   Type: Concentrated force
*Cload
Right_Support, 1, -1000.
Right_Support, 2, 0.
**
** OUTPUT REQUESTS
**
*Restart, write, frequency=0
**
** FIELD OUTPUT: F-Output-1
**
*Output, field, variable=PRESELECT
**
** HISTORY OUTPUT: H-Output-1
**
*Output, history, variable=PRESELECT
*End Step
