*Heading
** Job name: Job Model name: Model-1
** Generated by: Abaqus/CAE Student Edition 2019
*Preprint, echo=NO, model=NO, history=NO, contact=NO
**
** PARTS
**
*Part, name=Beam
*Node
      1, -0.479999661,           0.
      2, -0.229999676,           0.
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*Element, type=B21
  1,   1,   8
  2,   8,   9
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*Nset, nset=Midpoint
 4,
*Nset, nset=L/4
 2,
*Nset, nset=L/3
 3,
*Nset, nset=TwoL/3
 5,
*Nset, nset=ThreeL/4
 6,
*Nset, nset=All, generate
   1,  911,    1
*Elset, elset=All, generate
   1,  910,    1
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** Section: Section-1  Profile: Square
*Beam Section, elset=All, material=Material-1, temperature=GRADIENTS, section=RECT
0.1, 0.1
0.,0.,-1.
*End Part
**
**
** ASSEMBLY
**
*Assembly, name=Assembly
**
*Instance, name=Beam-1, part=Beam
*End Instance
**
*End Assembly
**
** MATERIALS
**
*Material, name=Material-1
*Elastic
 2e+11, 0.33
**
** BOUNDARY CONDITIONS
**
** Name: Left Support Type: Displacement/Rotation
*Boundary
Beam-1."Left Point", 1, 1
Beam-1."Left Point", 2, 2
** Name: Right Support Type: Displacement/Rotation
*Boundary
Beam-1."Right Point", 2, 2
** ----------------------------------------------------------------
**
** STEP: Load
**
*Step, name=Load, nlgeom=NO
Loaded
*Static
1., 1., 1e-05, 1.
**
** LOADS
**
** Name: Load   Type: Concentrated force
*Cload
Beam-1.TwoL/3, 2, -10000.
**
** OUTPUT REQUESTS
**
*Restart, write, frequency=0
**
** FIELD OUTPUT: F-Output-1
**
*Output, field, variable=PRESELECT
**
** HISTORY OUTPUT: H-Output-1
**
*Output, history, variable=PRESELECT
*End Step
