*Heading
** Job name: Beam-job Model name: Model-1
** Generated by: Abaqus/CAE Student Edition 2019
*Preprint, echo=NO, model=NO, history=NO, contact=NO
**
** PARTS
**
*Part, name=Part-1
*Node
      1,  0.036144834, -0.012048278,           0.
      2, 0.0340776742, 0.0170388371,           0.
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*Element, type=C3D8R
  1,  17,  27,  26,  24,   1,  11,  10,   8
  2,  19,  29,  28,  18,   3,  13,  12,   2
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*Nset, nset=Beam, generate
   1,  240,    1
*Elset, elset=Beam, generate
   1,  112,    1
*Nset, nset=Set-2, generate
   1,  240,    1
*Elset, elset=Set-2, generate
   1,  112,    1
** Section: Beam
*Solid Section, elset=Set-2, material="Aluminum 6061"
,
*End Part
**
**
** ASSEMBLY
**
*Assembly, name=Assembly
**
*Instance, name=Part-1-1, part=Part-1
*End Instance
**
*Nset, nset=Set-2, instance=Part-1-1
 16,
*Nset, nset=Set-3, instance=Part-1-1
 16,
*Nset, nset=Set-4, instance=Part-1-1
 8,
*Nset, nset="Support Set", instance=Part-1-1
 240,
*End Assembly
**
** MATERIALS
**
*Material, name="Aluminum 6061"
*Elastic
 7.68e+08, 0.33
**
** BOUNDARY CONDITIONS
**
** Name: BC-2 Type: Displacement/Rotation
*Boundary
Set-3, 1, 1
Set-3, 3, 3
** Name: fixed support Type: Symmetry/Antisymmetry/Encastre
*Boundary
"Support Set", PINNED
** ----------------------------------------------------------------
**
** STEP: load
**
*Step, name=load, nlgeom=NO
Load step
*Static
1., 1., 1e-05, 1.
**
** LOADS
**
** Name: Load-1   Type: Concentrated force
*Cload
Set-4, 1, 100.
Set-4, 2, 100.
Set-4, 3, 1000.
**
** OUTPUT REQUESTS
**
*Restart, write, frequency=0
**
** FIELD OUTPUT: F-Output-1
**
*Output, field, variable=PRESELECT
**
** HISTORY OUTPUT: H-Output-1
**
*Output, history, variable=PRESELECT
*End Step
