*Heading
** Job name: Job-1 Model name: Model-1
** Generated by: Abaqus/CAE Student Edition 2019
*Preprint, echo=NO, model=NO, history=NO, contact=NO
**
** PARTS
**
*Part, name=Part-1
*Node
      1,           0.,           0.,           0.
      2, 0.0500000007,           0.,           0.
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*Element, type=S4R
  1,   1,   2,  23,  22
  2,   2,   3,  24,  23
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*Nset, nset=Panel, generate
   1,  441,    1
*Elset, elset=Panel, generate
   1,  400,    1
** Section: Kevlar_Shell
*Shell Section, elset=Panel, material=Kevlar
0.03, 5
*End Part
**
**
** ASSEMBLY
**
*Assembly, name=Assembly
**
*Instance, name=Part-1-1, part=Part-1
*End Instance
**
*Nset, nset=Pinned_Edges, instance=Part-1-1
   1,   2,   3,   4,   5,   6
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*Elset, elset=Pinned_Edges, instance=Part-1-1
   1,   2,   3,   4,   5,   6
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*Nset, nset=Set-2, instance=Part-1-1
 421,
*Elset, elset=_Pressure_SPOS, internal, instance=Part-1-1, generate
   1,  400,    1
*Surface, type=ELEMENT, name=Pressure
_Pressure_SPOS, SPOS
*End Assembly
**
** MATERIALS
**
*Material, name=Kevlar
*Density
1400.,
*Elastic
 6.2e+10, 0.44
*No Compression
** ----------------------------------------------------------------
**
** STEP: Loaad
**
*Step, name=Loaad, nlgeom=YES
*Dynamic, Explicit
, 1.
*Bulk Viscosity
0.06, 1.2
**
** BOUNDARY CONDITIONS
**
** Name: BC-1 Type: Displacement/Rotation
*Boundary
Pinned_Edges, 1, 1
Pinned_Edges, 2, 2
Pinned_Edges, 3, 3
**
** LOADS
**
** Name: Atmospheric_Pressure   Type: Pressure
*Dsload
Pressure, P, -1000.
**
** OUTPUT REQUESTS
**
*Restart, write, number interval=1, time marks=NO
**
** FIELD OUTPUT: F-Output-1
**
*Output, field, variable=PRESELECT
**
** HISTORY OUTPUT: H-Output-1
**
*Output, history, variable=PRESELECT, frequency=1
*End Step
