*Heading
** Job name: Vacuum_Pressure Model name: Model-1
** Generated by: Abaqus/CAE Student Edition 2019
*Preprint, echo=NO, model=NO, history=NO, contact=NO
**
** PARTS
**
*Part, name=Circular_Beam
*Node
      1,           0.,           0.,           0.
      2,  0.150000006,           0.,           0.
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*Element, type=B31
 1,  1,  2
 2,  2,  3
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*Nset, nset=Beam, generate
  1,  11,   1
*Elset, elset=Beam, generate
  1,  10,   1
** Section: Circular_Section  Profile: Circular_Section
*Beam Section, elset=Beam, material=Aluminum, poisson = 0.33, temperature=GRADIENTS, section=CIRC
0.0254
0.,0.,-1.
*End Part
**
*Part, name=Square_Panel
*Node
      1,  -1.45000005,  -1.45000005,           0.
      2,  -1.29999995,  -1.45000005,           0.
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*Element, type=M3D4R
  1,   1,   2,  13,  12
  2,   2,   3,  14,  13
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*Nset, nset=Square_Panel, generate
   1,  121,    1
*Elset, elset=Square_Panel, generate
   1,  100,    1
** Section: Kevlar_Section
*Membrane Section, elset=Square_Panel, material=Kevlar, poisson=0.37
0.01,
*End Part
**
**
** ASSEMBLY
**
*Assembly, name=Assembly
**
*Instance, name=Circular_Beam-1, part=Circular_Beam
         3.3,           0.,           0.
*End Instance
**
*Instance, name=Circular_Beam-2, part=Circular_Beam
         3.3,           0.,           0.
         3.3,           0.,           0.,          3.3,           0., 1.00000001268805, 89.9999992730282
*End Instance
**
*Instance, name=Circular_Beam-3, part=Circular_Beam
         4.8,          1.5,           0.
         4.8,          1.5,           0.,          4.8,          1.5, -1.00000001268805, 89.9999992730282
*End Instance
**
*Instance, name=Circular_Beam-4, part=Circular_Beam
         4.8,          1.5,           0.
         4.8,          1.5,           0.,          4.8,          1.5,           1.,         180.
*End Instance
**
*Instance, name=Square_Panel-1, part=Square_Panel
        4.75,         0.05, 0.0254000000000001
        4.75,         0.05, 0.0254000000000001,         5.75,         0.05, 0.0254000000000001,         180.
*End Instance
**
*Nset, nset=Beam_edges, instance=Circular_Beam-1, generate
  1,  11,   1
*Nset, nset=Beam_edges, instance=Circular_Beam-2, generate
  1,  11,   1
*Nset, nset=Beam_edges, instance=Circular_Beam-3, generate
  1,  11,   1
*Nset, nset=Beam_edges, instance=Circular_Beam-4, generate
  1,  11,   1
*Nset, nset=Beams, instance=Circular_Beam-1, generate
  1,  11,   1
*Nset, nset=Beams, instance=Circular_Beam-2, generate
  1,  11,   1
*Nset, nset=Beams, instance=Circular_Beam-3, generate
  1,  11,   1
*Nset, nset=Beams, instance=Circular_Beam-4, generate
  1,  11,   1
*Elset, elset=Beams, instance=Circular_Beam-1, generate
  1,  10,   1
*Elset, elset=Beams, instance=Circular_Beam-2, generate
  1,  10,   1
*Elset, elset=Beams, instance=Circular_Beam-3, generate
  1,  10,   1
*Elset, elset=Beams, instance=Circular_Beam-4, generate
  1,  10,   1
*Nset, nset=Panel_Edges_Nodes, instance=Square_Panel-1
   1,   2,   3,   4,   5,   6
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*Nset, nset=Panel_Edges_geo, instance=Square_Panel-1
   1,   2,   3,   4,   5,   6
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*Elset, elset=Panel_Edges_geo, instance=Square_Panel-1
   1,   2,   3,   4,   5,   6
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*Nset, nset=Pinned_Point, instance=Circular_Beam-2
 1,
*Nset, nset=Slider_Points, instance=Circular_Beam-3
 11,
*Nset, nset=Slider_Points, instance=Circular_Beam-4
  1, 11
*Nset, nset=m_Set-3, instance=Square_Panel-1, generate
   1,  121,    1
*Elset, elset=m_Set-3, instance=Square_Panel-1, generate
   1,  100,    1
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*Elset, elset=_Surf-1_SNEG, internal, instance=Square_Panel-1, generate
   1,  100,    1
*Surface, type=ELEMENT, name=Surf-1
_Surf-1_SNEG, SNEG
*Surface, type=NODE, name=Beam_edges_CNS_, internal
Beam_edges, 1.
*Surface, type=NODE, name=Panel_Edges_geo_CNS_, internal
Panel_Edges_geo, 1.
** Constraint: Constraint-1
*Tie, name=Constraint-1, adjust=yes, position tolerance=0.0255, no rotation
Panel_Edges_geo_CNS_, Beam_edges_CNS_
*End Assembly
**
** MATERIALS
**
*Material, name=Aluminum
*Elastic
 7e+10, 0.33
*Material, name=Kevlar
*Elastic
 6.2e+10, 0.44
** ----------------------------------------------------------------
**
** STEP: Load
**
*Step, name=Load, nlgeom=NO
Loaded Step
*Static
1., 1., 1e-05, 1.
**
** BOUNDARY CONDITIONS
**
** Name: BC-1 Type: Displacement/Rotation
*Boundary
Pinned_Point, 1, 1
Pinned_Point, 2, 2
Pinned_Point, 3, 3
** Name: BC-2 Type: Displacement/Rotation
*Boundary
Slider_Points, 3, 3
**
** LOADS
**
** Name: Pressure   Type: Pressure
*Dsload
Surf-1, P, -100000.
**
** OUTPUT REQUESTS
**
*Restart, write, frequency=0
**
** FIELD OUTPUT: F-Output-1
**
*Output, field, variable=PRESELECT
**
** HISTORY OUTPUT: H-Output-1
**
*Output, history, variable=PRESELECT
*End Step
